# VOCABULARY
t := 1.0
T := 1, 1.5 .. 5
r_bar(t) := 0.02
α_x(t) := 0.15
α_y(t) := 0.02
σ_x(t) := 0.20
σ_y(t) := 0.10
ρ(t) := -0.30
s(t) := 0
x := 0.4
y := 0.5
Δ(t, v) := integral(r_bar(u), u = t .. v)
Δ(t, T) = [0; 0.01; 0.02; 0.03; 0.04; 0.05; 0.06; 0.07; 0.08]
D(t, v) := e^(-Δ(t, v))
D(t, T) = [1; 0.99005; 0.980199; 0.970446; 0.960789; 0.951229; 0.941765; 0.932394; 0.923116]
ϕ_x(t, v) := e^(-α_x(t)*(v - t))
ϕ_x(t, T) = [1; 0.927743; 0.860708; 0.798516; 0.740818; 0.687289; 0.637628; 0.591555; 0.548812]
ϕ_y(t, v) := e^(-α_y(t)*(v - t))
ϕ_y(t, T) = [1; 0.99005; 0.980199; 0.970446; 0.960789; 0.951229; 0.941765; 0.932394; 0.923116]
Σ_xx(t, v) := σ_x(t)^2/(2*α_x(t))*(1 - e^(-2*α_x(t)*(v - t)))
Σ_xx(t, T) = [0; 0.0185723; 0.0345576; 0.0483162; 0.0601584; 0.0703511; 0.079124; 0.086675; 0.0931741]
Σ_xy(t, v) := ρ(t)*σ_x(t)*σ_y(t)/(α_x(t) + α_y(t))*(1 - e^(-((α_x(t) + α_y(t))*(v - t))))
Σ_xy(t, T) = [0; -0.00287604; -0.00551771; -0.00794412; -0.0101728; -0.0122199; -0.0141002; -0.0158272; -0.0174135]
Σ_yy(t, v) := σ_y(t)^2/(2*α_y(t))*(1 - e^(-2*α_y(t)*(v - t)))
Σ_yy(t, T) = [0; 0.00495033; 0.00980264; 0.0145589; 0.0192209; 0.0237906; 0.0282699; 0.0326604; 0.0369641]
Σ_star(t, u) := ϕ_x(t, u)^2*Σ_xx(0, t) + 2*ϕ_x(t, u)*ϕ_y(t, u)*Σ_xy(0, t) + ϕ_y(t, u)^2*Σ_yy(0, t)
Σ_star(t, T) = [0.0333248; 0.0292163; 0.025709; 0.0227151; 0.0201599; 0.017979; 0.0161175; 0.0145283; 0.0131711]
r1_tilde(t) := r_bar(t) - s(t)
r1_tilde(T) = [0.02; 0.02; 0.02; 0.02; 0.02; 0.02; 0.02; 0.02; 0.02]
R1(x, y, t, t_1) := r1_tilde(t)*e^(ϕ_x(t, t_1)*x + ϕ_y(t, t_1)*y - 1/2*Σ_star(t, t_1))
R1(x, y, t, T) = [0.0483792; 0.0468638; 0.0454794; 0.0442123; 0.0430505; 0.0419834; 0.0410014; 0.0400964; 0.0392609]
t_2 := 1.5
F_xy(t, t_1, t_2) := ϕ_x(t_1, t_2)*Σ_xx(t, t_1) + (ϕ_x(t_1, t_2) + ϕ_y(t_1, t_2))*Σ_xy(t, t_1) + ϕ_y(t_1, t_2)*Σ_yy(t, t_1)
F_xy(t, T, t_2) = [0; 0.0177705; 0.0356296; 0.0536541; 0.0719218; 0.0905119; 0.109505; 0.128986; 0.149038]
r2_tilde(t) := r1_tilde(t)*integral(r1_tilde(t_1)*(e^F_xy(0, t_1, t) - 1), t_1 = 0 .. t)
r2_tilde(T)*10^3 = [0.00672695; 0.0142595; 0.0239079; 0.0352706; 0.0480116; 0.0618519; 0.0765618; 0.0919538; 0.107876]
R2(x, y, t, t_1) := r2_tilde(t_1)*e^(ϕ_x(t, t_1)*x + ϕ_y(t, t_1)*y - 1/2*Σ_star(t, t_1))
R2(x, y, t, T) = [1.62722e-5; 3.34128e-5; 5.4366e-5; 7.79698e-5; 0.000103346; 0.000129837; 0.000156957; 0.000184351; 0.000211766]
f1(x, y, t, T) := integral(R1(x, y, t, t_1) - r1_tilde(t_1), t_1 = t .. T)
f1(x, y, t, T) = [0; 0.013805; 0.0268857; 0.039304; 0.0511155; 0.0623703; 0.0731131; 0.0833845; 0.0932211]
f2(x, y, t, T) := 1/2*integral(R1(x, y, t, t_1) - r1_tilde(t_1), t_1 = t .. T)^2
f2(x, y, t, T)*10^3 = [0; 0.0952889; 0.361419; 0.772401; 1.3064; 1.94503; 2.67276; 3.47649; 4.34509]
f3_prime(x, y, t, t2) := integral(R1(x, y, t, t_1)*(e^F_xy(t, t_1, t2) - 1), t_1 = t .. t2)
f3_prime(x, y, t, T)*10^3 = [0; 0.21154; 0.780314; 1.62207; 2.66921; 3.86784; 5.17529; 6.55807; 7.9901]
f3(x, y, t, T) := integral(R1(x, y, t, t2)*f3_prime(x, y, t, t2) - R2(x, y, t, t2), t2 = t .. T)
1000000*f3(x, y, t, T) = [0; -10.5335; -21.5321; -28.0832; -26.9246; -15.9943; 5.90506; 39.3541; 84.5016]
F1(x, y, t, T) := D(t, T)*(1 - f1(x, y, t, T))
F1(x, y, t, T) = [1; 0.976382; 0.953845; 0.932303; 0.911678; 0.891901; 0.872909; 0.854647; 0.837062]
F2(x, y, t, T) := D(t, T)*(1 - f1(x, y, t, T) + f2(x, y, t, T) + f3(x, y, t, T))
F2(x, y, t, T) = [1; 0.976466; 0.954179; 0.933025; 0.912907; 0.893736; 0.875432; 0.857925; 0.841151]
F_star(x, y, t, T) := D(t, T)*(e^(-f1(x, y, t, T)) + f3(x, y, t, T))
F_star(x, y, t, T) = [1; 0.976466; 0.954175; 0.933016; 0.912886; 0.893698; 0.875372; 0.857837; 0.84103]
